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/batch
! ANSYS input file written by Workbench version 19.1 RELEASE
! File used for geometry attach: C:\Users\JosueMorenoMtz\AppData\Local\Temp\WB_DESKTOP-SRRC06L_JosueMorenoMtz_4784_3\unsaved_project_files\dp0\SYS\DM\SYS.scdoc
/title,unsaved_project--Static Structural (A5)
/com,--- Data in consistent MKS units. See Solving Units in the help system for more information.
/units,MKS
/prep7
! Turn off shape checking because checks already performed inside WB mesher.
! See help system for more information.
SHPP,OFF,,NOWARN
etcon,set             ! allow ANSYS to choose best KEYOP's for 180x elements
/com,*********** Nodes for the whole assembly ***********
nblock,3,,4570
(1i9,3e20.9e3)
        1     3.000000000E-01     2.920000000E-01     1.811000000E-02
        2     3.000000000E-01     3.070000000E-01     3.311000000E-02
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-1
/com,*********** Elements for Body 1 "SYS\Solid" ***********
et,1,187
eblock,19,solid,,2240
(19i9)
        1        1        1        1        0        0        0        0       10        0        1      532      644      649      646     3617     4099     3621     3619
     4098     4109
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-1
/com,*********** Send User Defined Coordinate System(s) ***********
csys,0
toffst,273.15,  ! Temperature offset from absolute zero
/com,*********** Set Reference Temperature ***********
tref,22.
/com,*********** Send Materials ***********
Temperature = 'TEMP' ! Temperature
MP,DENS,1,7850,	! kg m^-3
MP,ALPX,1,1.2e-05,	! C^-1
MP,C,1,434,	! J kg^-1 C^-1
MP,KXX,1,60.5,	! W m^-1 C^-1
MP,RSVX,1,1.7e-07,	! kg m^3 A^-2 s^-3
MP,EX,1,200000000000,	! Pa
MP,NUXY,1,0.3,
MP,MURX,1,10000,

!************************* Model Summary ********************
!SYS\Solid,	Structural Steel,	matid,	1
!************************* End Model Summary ********************
/com,*********** Define Pressure Using Surface Effect Elements ***********
et,2,154
eblock,10,,,161
(15i9)
     2241        2        2        2        0      226      214      215      215     2178     2174      215     2183
     2242        2        2        2        0      220      224      238      238     2210     2242      238     2211
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-1
esel,s,type,,2
esel,all

*DIM,_loadvari72,TABLE,2,1,1,TIME,
! Time values
_loadvari72(1,0,1) = 0.
_loadvari72(2,0,1) = 1.
! Load values
_loadvari72(1,1,1) = 0.
_loadvari72(2,1,1) = 12.

/com,*********** Define Force Using Surface Effect Elements ***********
local,12,0,0.,0.,0.,0.,0.,0.
csys,0
et,3,154
eblock,10,,,161
(15i9)
     2402        3        3        3       12      226      214      215      215     2178     2174      215     2183
     2403        3        3        3       12      220      224      238      238     2210     2242      238     2211
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-1
esel,s,type,,3
keyop,3,2,1                ! Apply load in local coordinate system
keyop,3,7,1                ! Use original area so load is constant in large deformation
keyop,3,11,2               ! Use real and not project area
esel,all

*DIM,_loadvari77x,TABLE,2,1,1,TIME,
! Time values
_loadvari77x(1,0,1) = 0.
_loadvari77x(2,0,1) = 1.
! Load values
_loadvari77x(1,1,1) = 0.
_loadvari77x(2,1,1) = 0.


*DIM,_loadvari77y,TABLE,2,1,1,TIME,
! Time values
_loadvari77y(1,0,1) = 0.
_loadvari77y(2,0,1) = 1.
! Load values
_loadvari77y(1,1,1) = 0.
_loadvari77y(2,1,1) = 97.0753234439132


*DIM,_loadvari77z,TABLE,2,1,1,TIME,
! Time values
_loadvari77z(1,0,1) = 0.
_loadvari77z(2,0,1) = 1.
! Load values
_loadvari77z(1,1,1) = 0.
_loadvari77z(2,1,1) = 0.

/com,*********** Define Line Pressure Vector Using Surface Effect Elements ***********
local,13,0,0.,0.,0.,0.,0.,0.
csys,0
et,4,156
keyop,4,5,1   ! No orientation node
eblock,10,,,5
(15i9)
     2563        4        4        4       13      193      194     2087
     2564        4        4        4       13      193      197     2088
     2565        4        4        4       13      196      195     2098
     2566        4        4        4       13      194      195     2093
     2567        4        4        4       13      197      196     2103
-1
esel,s,type,,4
keyop,4,2,1                ! Apply load in local coordinate system
esel,all

*DIM,_loadvari79x,TABLE,2,1,1,TIME,
! Time values
_loadvari79x(1,0,1) = 0.
_loadvari79x(2,0,1) = 1.
! Load values
_loadvari79x(1,1,1) = 0.
_loadvari79x(2,1,1) = 12.


*DIM,_loadvari79y,TABLE,2,1,1,TIME,
! Time values
_loadvari79y(1,0,1) = 0.
_loadvari79y(2,0,1) = 1.
! Load values
_loadvari79y(1,1,1) = 0.
_loadvari79y(2,1,1) = 0.


*DIM,_loadvari79z,TABLE,2,1,1,TIME,
! Time values
_loadvari79z(1,0,1) = 0.
_loadvari79z(2,0,1) = 1.
! Load values
_loadvari79z(1,1,1) = 0.
_loadvari79z(2,1,1) = 0.

esel,all
fini
/com,****************************************************************************
/com,*************************    SOLUTION       ********************************
/com,****************************************************************************
/solu
antype,0                   ! static analysis
eqsl,pcg,1e-8,,,,,,1
cntr,print,1               ! print out contact info and also make no initial contact an error
dmpoption,emat,no             ! Don't combine emat file for DANSYS
dmpoption,esav,no             ! Don't combine esav file for DANSYS
nldiag,cont,iter           ! print out contact info each equilibrium iteration
rescontrol,,none                 ! Do not keep any restart files
/com,****************************************************
/com,******************* SOLVE FOR LS 1 OF 1 ****************
esel,s,type,,2
nsle
sf,all,pres,%_loadvari72%
nsel,all
esel,all
esel,s,type,,3
nsle
sfe,all,1,pres,1,%_loadvari77x%
sfe,all,2,pres,1,%_loadvari77y%
sfe,all,3,pres,1,%_loadvari77z%
nsel,all
esel,all
esel,s,type,,4
nsle
sfe,all,1,pres,1,%_loadvari79x%
sfe,all,2,pres,1,%_loadvari79y%
sfe,all,3,pres,1,%_loadvari79z%
nsel,all
esel,all
esel,all
nsub,1,1,1
time,1.
outres,erase
outres,all,none
outres,nsol,all,
outres,rsol,all
outres,strs,all,
outres,epel,all,
outres,eppl,all,
stabilize,off                   ! Stabilization turned OFF by user
! *********** WB SOLVE COMMAND ***********
! check interactive state
*get,ANSINTER_,active,,int
*if,ANSINTER_,ne,0,then
/eof
*endif
solve
/com *************** Write FE CONNECTORS *********
CEWRITE,file,ce,,INTE
/com,****************************************************
/com,*************** FINISHED SOLVE FOR LS 1 *************
*get,_PCGITER,active,,solu,cgiter
/post1
fini
